A := [-8, -2, 5; -9, 0, -5; 9, 9, -7]
B := [-5, -4, -4; -8, -2, -8; 2, 6, -7]
V1 := [-2; 7; 2]
V2 := [-5; -7; 4]
A + B = [-13, -6, 1; -17, -2, -13; 11, 15, -14]
A*B = [66, 66, 13; 35, 6, 71; -131, -96, -59]
A*V1 = [12; 8; 31]
transpose(V1)*V2 = -31
transpose(V1)*A*V2 = -245
V1×V2 = [42; -2; 49]
V1*V2 = -31
|V1| = 7.54983
CosV1V2 := V1*V2/(|V1|*|V2|)
V1*V2/(|V1|*|V2|) = -0.432816
X := V1[0]*sin(V1[1])*cos(V1[2])
X = 0.546806
Y := V1[0]*sin(V1[1])*sin(V1[2])
Y = -1.19479
Z := V1[0]*cos(V1[1])
Z = -1.5078
