f(x) := sin(π*x)*sqrt(|x|)
x1 := -6
x2 := 6
Δx := 0.1
Xlw := 100
Ylw := 200
Xhw := 800
Yhw := 900
# Вычисляем число точек графика
N := round((x2 - x1)/Δx)
N = 120
i := 0 .. N
X[i] := x1 + i*Δx
Y[i] := f(X[i])
Z[i] := 1
# Определяем область графика в МСК:
Xl := min(X)
Yh := max(Y)  # <—левый верхний
Xl = -6
Yh = 2.34521
Xh := max(X)
Yl := min(Y)  # <—правый нижний
Xh = 6
Yl = -2.34521
# Матрица координат точек МСК
Ms := stack(transpose(X), transpose(Y), transpose(Z))
# Расчет параметров для создания матрицы перехода из МСК в 1ОСК
ΔXw := Xhw - Xlw
ΔXw = 700
ΔX := Xh - Xl
ΔX = 12
ΔYw := Yhw - Ylw
ΔYw = 700
ΔY := Yh - Yl
ΔY = 4.69042
Kx := ΔXw/ΔX
Kx = 58.3333
Ky := ΔYw/ΔY
Ky = 149.241
# Сама матрица перехода:
Tsw := [Kx, 0, Xlw - Kx*Xl; 0, -Ky, Yhw + Ky*Yl; 0, 0, 1]
# Матрица координат точек графика в ОСК:
Mw := Tsw*Ms
# Из этой матрицы выбираем только X и Y - координаты точек графика
Xw := transpose(Mw)[:, 0]
Yw := transpose(Mw)[:, 1]
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