# Задаем координаты вершин пирамиды и положения камеры:
PIR := [0, 0, 3, 0, 0, 1; 3, 0, 0, 1, 0, 0; 0, 0, 0, 3, 3, 3; 1, 1, 1, 1, 1, 1]
PV := [10; 315; 45]
# Получаем сферические координаты точки наблюдения:
r_v := PV[0] = 10
ϕ_v := PV[1]*π/180 = 5.49779
θ_v := PV[2]*π/180 = 0.785398
R_C := [r_v*sin(θ_v)*cos(ϕ_v); r_v*sin(θ_v)*sin(ϕ_v); r_v*cos(θ_v)] = [5; -5; 7.07107]
# Задаем положение секущей плоскости в МСК XYZ | B[1]*BCC[1]
# ABC | A[1]*ACC[1]
# -угол между осью z и вектором нормали к секущей плоскости
ϕ_grad := 50
M3 := [0, 0, 0; 0, 0, 1; 0, 3, 3]
M2 := [1, 0, 3; 3, 0, 0; 0, 3, 0]
M1 := [0, 0, 3; 0, 0, 0; 3, 0, 0]
ϕ := ϕ_grad/180*π
ϕ = 0.872665
# - вектор нормали к секущей плоскости
n2 := [i, j, k; 3 - 1, 0 - 0, 0 - 3; 0 - 1, 3 - 0, 0 - 3] = -i9 + j3 + k7  # error: Эта переменная не определена.
n3 := [i, j, k; 0 - 0, 0 - 0, 1 - 0; 0 - 0, 3 - 0, 3 - 0] = i3 + j1 + k0  # error: Эта переменная не определена.
n1 := [i, j, k; 0 - 0, 0 - 0, 0 - 3; 3 - 0, 0 - 0, 0 - 3] = i*0 - j9 + k0  # error: Эта переменная не определена.
N := transpose([0, sin(ϕ), cos(ϕ)])
# - координаты точки пересечения оси Z и секущей плоскости
a2 := -9
b2 := 3
c2 := 7
a1 := 0
b1 := -9
c1 := 0
x_0 := 0
y_0 := 0
z_0 := 3/4*PIR[:, 3][2]
a3 := 3
b3 := 1
c3 := 0
z_0 = 2.25
v2 := [a2; b2; c2]
# Задаем параметры уравнения секущей плоскости
v1 := [a1; b1; c1] = [0; -9; 0]
v3 := [a3; b3; c3]
v2*R_C = -10.5025
v1*R_C = 45
[A; B; C] := N
v3*R_C = 10
[A; B; C] = [0; 0.766044; 0.642788]
D := -(A*x_0 + B*y_0 + C*z_0)
D = -1.44627
B[1]*BAA[1]
B[1]*BCC[1]
# Находим точку пересечения P1 секущей плоскости с ребром СС_1 (58)
M4 := [0, 0, 1; 0, 0, 0; 0, 3, 3]
M5 := [0, 1, 0; 0, 0, 1; 3, 3, 3]
[x1; y1; z1] := submatrix(PIR, 0, 2, 0, 0) = [0; 3; 0]
[x2; y2; z2] := submatrix(PIR, 0, 2, 3, 3) = [0; 1; 3]
n4 := [i, j, k; 0 - 0, 0 - 0, 0 - 1; 0 - 0, 3 - 0, 3 - 1] = -i3 + j0 + k0  # error: Эта переменная не определена.
n5 := [i, j, k; 0 - 0, 0 - 1, 1 - 0; 3 - 0, 3 - 1, 3 - 0] = -i5 + j6 - k3  # error: Эта переменная не определена.
Δx := x2 - x1
Δy := y2 - y1
Δz := z2 - z1
a4 := -3
b4 := 0
c4 := 0
t_AD1 := -((A*x1 + B*y1 + C*z1 + D)/(A*Δx + B*Δy + C*Δz))
# - параметр, при котором ребро и плоскость имеют общую точку. Если между 0 и 1, то ребро пересекает плоскость
a5 := -5
b5 := 6
c5 := -3
t_AD := 0.3
v4 := [a4; b4; c4]
v5 := [a5; b5; c5]
x_AD := x1 + Δx*t_AD
y_AD := y1 + Δy*t_AD
z_AD := z1 + Δz*t_AD
v4*R_C = -15
v5*R_C = -76.2132
x_AD = 0
y_AD = 2.4
z_AD = 0.9  # - координаты точки пересечения Р1
# Находим точку пересечения P2 секущей плоскости с ребром АА_1
V1 := submatrix(PIR, 0, 2, 2, 2) = [3; 0; 0]
V2 := submatrix(PIR, 0, 2, 5, 5) = [1; 0; 3]
ΔV := V2 - V1
t_CF := -((N*V1 + D)/(N*ΔV))
V_CF := V1 + ΔV*t_CF
x_CF := V_CF[0]
y_CF := V_CF[1]
z_CF := V_CF[2]  # - координаты точки пересечения Р2
# Находим точку пересечения P3 секущей плоскости с ребром ВВ_1
V1 := submatrix(PIR, 0, 2, 1, 1) = [0; 0; 0]
V2 := submatrix(PIR, 0, 2, 4, 4) = [0; 0; 3]
ΔV := V2 - V1
t_BE := -((N*V1 + D)/(N*ΔV))
V_BE := V1 + ΔV*t_BE
x_BE := V_BE[0]
y_BE := V_BE[1]
z_BE := V_BE[2]  # - координаты точки пересечения Р3
# Получаем матрицу мировых коорднат точек P1, P2, P3
TR := [x_AD, x_CF, x_BE; y_AD, y_CF, y_BE; z_AD, z_CF, z_BE; 1, 1, 1]
# Задаем область отображения графика в окне Windows
x_LW := 200
y_LW := 100  # – левый верхний угол области отображения
x_HW := 700
y_HW := 500  # – правый нижний угол области отображения
# Формируем матрицу пересчета мировых координат в видовые
K_view := [
    -sin(ϕ_v), cos(ϕ_v), 0, 0;
    -cos(θ_v)*cos(ϕ_v), -cos(θ_v)*sin(ϕ_v), sin(θ_v), 0;
    -sin(θ_v)*cos(ϕ_v), -sin(θ_v)*sin(ϕ_v), -cos(θ_v), r_v;
    0, 0, 0, 1
]
# Вычисляем координаты вершин пирамиды в видовой системе координат (ВСК)
PIR_V := K_view*PIR
# Вычисляем координаты вершин треугольника сечения Р1,
# Р2, Р3 в видовой системе координат (ВСК)
TR_V := K_view*TR
# Определяем координаты проекции вершин пирамиды на картинную плоскость
P_XY := stack(transpose(transpose(PIR_V)[:, 0]), transpose(transpose(PIR_V)[:, 1]), transpose(transpose(PIR_V)[:, 3]))
# Определяем координаты проекции вершин треугольника сечения Р1,
# Р2, Р3 на картинную плоскость
TR_XY := stack(transpose(transpose(TR_V)[:, 0]), transpose(transpose(TR_V)[:, 1]), transpose(transpose(TR_V)[:, 3]))
# Определяем габаритную область проекции пирамиды на плоскость XY ВСК – картинную плоскость
x_L := min(transpose(P_XY)[:, 0])
y_H := max(transpose(P_XY)[:, 1])
# – левый верхний угол
x_L = 0
y_H = 2.62132
x_H := max(transpose(P_XY)[:, 0])
y_L := min(transpose(P_XY)[:, 1])
# – правый нижний угол
x_H = 2.12132
y_L = -1.5
# Вычисляем параметры, необходимые для формирования матрицы пересчета координат из плоскости XY ВСК в ОК
Δx_W := x_HW - x_LW
Δx_W = 500
Δx := x_H - x_L
Δx = 2.12132
Δy_W := y_HW - y_LW
Δy_W = 400
Δy := y_H - y_L
Δy = 4.12132
k_x := Δx_W/Δx
k_x = 235.702
k_y := Δy_W/Δy
k_y = 97.0563
T_SW := [k_x, 0, x_LW - k_x*x_L; 0, -k_y, y_HW + k_y*y_L; 0, 0, 1]  # – матрица пересчета из ВСК в ОК
# Вычисляем оконные координаты вершин пирамиды
M_W := T_SW*P_XY
[x_a, x_b, x_c, x_d, x_e, x_f; y_a, y_b, y_c, y_d, y_e, y_f; q, q, q, q, q, q] := vectorize(round(M_W))
# Формируем массивы координат X и Y для рисования пирамиды
X := transpose([x_a, x_b, x_c, x_a, x_d, x_e, x_b, x_e, x_f, x_c, x_f, x_d])
Y := -transpose([y_a, y_b, y_c, y_a, y_d, y_e, y_b, y_e, y_f, y_c, y_f, y_d])
[x_a, x_b, x_c, x_d, x_e, x_f; y_a, y_b, y_c, y_d, y_e, y_f; q, q, q, q, q, q] = [700, 200, 700, 367, 200, 367; 209, 354, 500, 100, 149, 197; 1, 1, 1, 1, 1, 1]
# Вычисляем оконные координаты вершин
# треугольника сечения Р1, Р2, Р3
TR_W := T_SW*TR_XY
[x_p1, x_p2, x_p3; y_p1, y_p2, y_p3; q, q, q] := vectorize(round(TR_W)) = [600, 450, 200; 176, 273, 200; 1, 1, 1]
Xw := transpose([x_b, x_c, x_a, x_d, x_f, x_e])
Yw := -transpose([y_b, y_c, y_a, y_d, y_f, y_e])
# Формируем массивы координат Х и У для рисования
# сечения пирамиды
Xw := transpose([x_b, x_c, x_a, x_d, x_f, x_e, x_d, x_f, x_c, x_f, x_e, x_b])
XC := transpose([x_p1, x_p2, x_p3, x_p1])
Yw := -transpose([y_b, y_c, y_a, y_d, y_f, y_e, y_d, y_f, y_c, y_f, y_e, y_b])
YC := -transpose([y_p1, y_p2, y_p3, y_p1])
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# Вычисляем декартовы координаты камеры (вектора,
# определяющего положение камеры)
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